V1 := [9; 8; 3]
V2 := [6; 4; 5]
mod := |V1| = 12.4097
vec := V1×V2 = [28; -27; -12]
cos1 := V1*V2/(|V1|*|V2|) = 0.927504
scal := V1*V2 = 101
PView := [3; 3; 2]
R[0] := PView[0]*cos(PView[1])*sin(PView[2])
R[1] := PView[0]*sin(PView[1])*sin(PView[2])
R[2] := PView[0]*cos(PView[2])
R = [-2.70059; 0.38496; -1.24844]
