A := [3, 9, 6; 2, 11, 6; 10, 10, 4]
B := [6, 7, 7; 3, 9, 3; 3, 7, 4]
V1 := [9; 8; 3]
V2 := [6; 4; 5]
C1 := A + B = [9, 16, 13; 5, 20, 9; 13, 17, 8]
C2 := A*B = [63, 144, 72; 63, 155, 71; 102, 188, 116]
D := A*V1 = [117; 124; 182]
q := transpose(V1)*V2 = 101
p := transpose(V1)*A*V2 = 1804
