# Запишем условие задания
X1 := [2; 5]
Y1 := [12; 9]  # - координаты отрезка AB
X2 := [2; 5]
Y2 := [3; 6]  # - координаты отрезка CD
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# Найдем точку пересечения прямых
# (система уравнений)
Given
x + y == 14  # - уравнение прямой АВ  # (данные уравнения находятся из уравнения прямой по двум точкам)
x - y == -1  # - уравнение прямой CD
# (решение системы ур-ний)
Find(x, y) → [13/2; 15/2]
Px := 13/2
Py := 15/2
# Найдем новые координаты точек A,B,C,D после поворота на угол 180^о
P := [X1[0], X1[1], X2[0], X2[1]; Y1[0], Y1[1], Y2[0], Y2[1]; 1, 1, 1, 1]  # - матрица координат
Ts(dx, dy) := [1, 0, -dx; 0, 1, -dy; 0, 0, 1]  # - смещение начала системы координат
Rs(ϕ) := [cos(ϕ), sin(ϕ), 0; -sin(ϕ), cos(ϕ), 0; 0, 0, 1]  # - поворот системы координат на угол ϕ
ϕ := 180
ϕ_rad := ϕ*π/180  # - угол в радианах
# Сместим систему координат в точку Р
# (смещаем, иначе поворот будет относительно начала координат)
A := Ts(Px, Py)*P = [-4.5, -1.5, -4.5, -1.5; 4.5, 1.5, -4.5, -1.5; 1, 1, 1, 1]
# Повернем систему координат на 180 градусов
# (поворот, относительно установленной в предыдущем пункте точки)
B := Rs(ϕ_rad)*A = [4.5, 1.5, 4.5, 1.5; -4.5, -1.5, 4.5, 1.5; 1, 1, 1, 1]
# Снова сместим систему координат в исходное положение
# (для сдвига по оси x и y для отображения симметрично исходным прямым относительно точки пересечения прямых)
C := Ts(-Px, -Py)*B = [11, 8, 11, 8; 3, 6, 12, 9; 1, 1, 1, 1]
X3 := [11; 8]
Y3 := [3; 6]
X4 := [11; 8]
Y4 := [12; 9]
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